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# Задание 1
x := 2
n := 3
y := (sqrt(x^3 + n) + cos(|n*x - 1|)^2)/(nthroot(x^5 + sin(x) + n, 4)*cos((x + n)*π/4))
y = -1.96255
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Ответ
# Задание 2
x1 := 7
y1 := 10
z := -3
p := if(x1 > y1, sin(x1) + 3*|y1| - z^2, (y1 + 3)*ln(|x1 + 1|)/sqrt(z^2 + 1))
p = 8.5485
q := if((x1 > y1) and (x1 < 1), cos(x1) + 2*|y1 + 1| - z, (x1*y1 + 3)/sqrt(y1^2 + 5))
q = 7.12407
w := if((x1 < y1) or (y1 ≥ 10), x1^2 + 2*(y1*x1 + 1) - z, (x1^-3*y1^2 + 3)*sqrt(z^2 + 7))
w = 194
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# Задание 3
n := 4
x2 := -2, -1.6 .. 2
f(x2) := (x2^2 - n*x2 + sin(x2))*sqrt(|x2 - cos(n*x2)|)
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f(x2) = [15.1033; 12.819; 6.02284; 1.39052; 0.834594; 0; -0.688271; -2.47099; -2.5609; -2.21264; -4.52711]
x2 = [-2; -1.6; -1.2; -0.8; -0.4; 0; 0.4; 0.8; 1.2; 1.6; 2]
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# Задание 4
n := 2
a := -3*n
b := 3*n
a = -6
b = 6
A := runif(3, a, b)
B := runif(3, a, b)
C := runif(3, a, b)
A = [4.93858; 2.73195; 2.01342]
B = [-2.21976; -2.33014; -4.69707]
C = [4.21463; -4.14136; -5.04782]
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с использованием шаблонов
N := B×C
w := (A×B)*C
s := A*B
s = -26.7855
w = -84.3904
N = [-7.69014; -31.0014; 19.0135]
без использования шаблонов
# сколярное произведение | векторное произведение | смешеное произведение
k := 0 .. 2
abv[k] := (A[k]*B[k])
N2 := [B[1]*C[2] - B[2]*C[1]; B[2]*C[0] - B[0]*C[2]; B[0]*C[1] - B[1]*C[0]] = [-7.69014; -31.0014; 19.0135]
w2 := (A[1]*B[2] - A[2]*B[1])*C[0] + (A[2]*B[0] - A[0]*B[2])*C[1] + (A[0]*B[1] - A[1]*B[0])*C[2] = -84.3904
s2 := sum(abv) = -26.7855
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# вычисление длины
lA := sqrt(A[0]^2 + A[1]^2 + A[2]^2)
lB := sqrt(B[0]^2 + B[1]^2 + B[2]^2)
lC := sqrt(C[0]^2 + C[1]^2 + C[2]^2)
lA = 5.99224
lB = 5.6938
lC = 7.77139
p := if((lA > lB) and (lA > lC), "Это А", "Это не А")
p := if((lB > lA) and (lB > lC), "Это B", p)
p := if((lC > lB) and (lC > lA), "Это C", p)
p = "Это C"
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N1 := 10
i := 0, 1 .. N1
j := 0, 1 .. N1
M[i, j] := rnd(20) - 10
M = [
    -7.05373, 9.77017, -7.61841, -9.82155, 0.633283, 2.03528, -6.67501, -0.984282, -8.85888, 5.66638, 0.397523;
    7.51936, 9.118, 0.78683, -0.758523, 7.24439, 5.59317, 9.93591, 2.22985, -4.67572, 6.80238, -2.48285;
    3.54374, -9.82366, -4.48226, 1.75823, 6.75215, -0.301388, 4.87455, -0.840485, 4.88837, 1.98083, 4.70008;
    1.44797, -6.96886, -1.4967, 0.342401, 5.03073, -6.62008, -0.162315, 3.99506, -7.04959, -7.16803, 3.85761;
    -1.46907, 9.33208, -6.93489, 6.43346, -6.17299, 6.34367, -6.88873, 4.64014, -4.40822, 3.64487, 4.43816;
    -7.53945, 6.69314, 0.34037, -1.47577, 8.98677, 0.990812, -0.565567, 6.93928, -0.87813, 9.659, 4.78367;
    -6.07986, 6.78857, 0.0182435, -9.45008, 1.45145, 0.626339, 6.86073, 3.15198, 6.84273, -7.80106, -3.7183;
    -4.27836, -7.19438, 6.69233, 2.00485, -4.94559, -9.96761, 6.12479, -5.7885, 1.06385, -7.72433, 5.04436;
    0.868575, -1.26575, 3.92413, -1.26634, 1.55733, 2.57334, 0.0829852, 3.91536, -6.20097, -6.4325, -0.850831;
    -8.04955, -8.11192, 8.62979, 7.89202, -5.45363, -1.78577, 2.5614, -0.967733, 1.95656, 7.09584, 2.49556;
    1.31493, -6.31425, 1.10285, -5.14271, 2.09454, 1.69211, -0.111035, 4.81483, 2.40765, 6.09018, 1.52092
]
Mv[i] := sum(M[:, i])
sM := sum(Mv)
sM = 46.3146
# сумму положительных элементов массива
сумму отрицательных элементов массива
Mp[i, j] := M[i, j]*(M[i, j] > 0)
Mo[i, j] := M[i, j]*(M[i, j] < 0)
Mpv[i] := sum(Mp[:, i])
Mov[i] := sum(Mo[:, i])
sMp := sum(Mpv)
sMo := sum(Mov)
sMp = 295.391
sMo = -249.076
Y[i] := M[10, i]
X[i] := M[i, 0]
xy := X*Y
xy = -140.984
Y = [1.31493; -6.31425; 1.10285; -5.14271; 2.09454; 1.69211; -0.111035; 4.81483; 2.40765; 6.09018; 1.52092]
X = [-7.05373; 7.51936; 3.54374; 1.44797; -1.46907; -7.53945; -6.07986; -4.27836; 0.868575; -8.04955; 1.31493]
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# Задание 5
y5(x5) := e^(-|x5|/3)*cos(x5)
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# Задание 6
x6 := -9, -9 + 0.25 .. 9
x6 = [
    -9; -8.75; -8.5; -8.25; -8; -7.75; -7.5; -7.25; -7; -6.75
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]
f6(x6) := if(x6 < 0, e^x6*x6^3, e^(-x6)*x6^3)
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# Задание 7
Δx := π/4
i7 := 0 .. 15
x7[i7] := -2*π + i7*Δx
g7(x7) := sqrt(|x7|)*sin(x7)
g7(x7) = [0; 2.69879; 3.81667; 2.69879; 0; -2.69879; -3.81667; -2.69879; 0; 2.69879; 3.81667; 2.69879; 0; -2.69879; -3.81667; -2.69879]
x7 = [-6.28319; -5.49779; -4.71239; -3.92699; -3.14159; -2.35619; -1.5708; -0.785398; 0; 0.785398; 1.5708; 2.35619; 3.14159; 3.92699; 4.71239; 5.49779]
X := x7
Y := g7(x7)
X = [-6.28319; -5.49779; -4.71239; -3.92699; -3.14159; -2.35619; -1.5708; -0.785398; 0; 0.785398; 1.5708; 2.35619; 3.14159; 3.92699; 4.71239; 5.49779]
Y = [0; 2.69879; 3.81667; 2.69879; 0; -2.69879; -3.81667; -2.69879; 0; 2.69879; 3.81667; 2.69879; 0; -2.69879; -3.81667; -2.69879]
WRITEPRN("X.txt") := X
WRITEPRN("Y.txt") := Y
XX := READPRN("X.txt")
YY := READPRN("Y.txt")
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YY = [0; 2.699; 3.817; 2.699; 0; -2.699; -3.817; -2.699; 0; 2.699; 3.817; 2.699; 0; -2.699; -3.817; -2.699]
XX = [-6.283; -5.498; -4.712; -3.927; -3.142; -2.356; -1.571; -0.7854; 0; 0.7854; 1.571; 2.356; 3.142; 3.927; 4.712; 5.498]
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# Задание 8
q(x8) := e^(-x8^2)
qp(x8) := d/dx8(q(x8))
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# Задание 9
i := 0 .. 42
f9(x9, y9) := sin(sqrt(x9^2 + y9^2))/sqrt(x9^2 + y9^2)
j := 0 .. 42
x9[i] := -15 + i*30/43
y9[j] := -15 + j*30/43
M9[i, j] := f9(x9[i], y9[j])
# [component: inputs M9]
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# Задние 10
x := -5 .. 5
f(x) := x^2 + (x - 2)*sin(x) - 5
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x := -2
root(f(x), x) = -1.32936
x := 2
root(f(x), x) = 2.19967
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# Задание 11
f(x11) := x11^2 + x11*sin(2*x11) - (x11 - 5)*cos(x11)
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root(f(x11), x11, -4, -2) = -2.97354
root(f(x11), x11, -2, 4) = -1.93283
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# Задание 12
n := 6
V := [-3*n; 3 - 4*n; 4 - n; 1]
r := polyroots(V)
r = [-3; -1; 6]
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# Задание 13
n := 3
A := [n, (n + 1), n + 2; n - 3, n - 2, n; n - 1, n, n + 1]
B := [6*n + 8; 6*n - 7; 6*n + 2] = [26; 11; 20]
X := A^-1*B
A*X = [26; 11; 20]
X = [1; 2; 3]
x := X[0]
y := X[1]
z := X[2]
x = 1
y = 2
z = 3
x := 0
y := 0
z := 0
Given
n*x + (n + 1)*y + (n + 2)*z == 6*n + 8
(n - 3)*x + (n - 2)*y + n*z == 6*n - 7
(n - 1)*x + n*y + (n + 1)*z == 6*n + 2
V := Find(x, y, z) = [1; 2; 3]
x := V[0]
y := V[1]
z := V[2]
n*x + (n + 1)*y + (n + 2)*z = 26
6*n + 8 = 26
(n - 3)*x + (n - 2)*y + n*z = 11
6*n - 7 = 11
(n - 1)*x + n*y + (n + 1)*z = 20
6*n + 2 = 20
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# Задание 14
Given
x^2/81 + y^2/16 == 1
(x - 9)^2 + (y - 2)^2 == 25
V := Find(x, y) = [4.23934; 3.52845]
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# Задание 15
f(x) := x*sin(x)
x := 0, 0.1 .. 10
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x := 2
x_max := Maximize(f, x)
x_max = 2.02876
f(x_max) = 1.81971
x := 5
x_min := Minimize(f, x)
x_min = 4.91318
f(x_min) = -4.81447
x := 8
x_max2 := Maximize(f, x)
x_max2 = 7.97867
f(x_max2) = 7.91673
