# Исходные данные
PIR := [5, 0, 0, 2, 0, 0; 0, 0, 5, 0, 0, 2; 0, 0, 0, 10, 10, 10; 1, 1, 1, 1, 1, 1]  # координаты вершин пирамиды
A := transpose([5, 0, 0])
A1 := transpose([2, 0, 10])
PV := [10; 315; 45]  # координаты камеры
B := transpose([0, 0, 0])
B1 := transpose([0, 0, 10])
C := transpose([0, 5, 0])
C1 := transpose([0, 2, 10])
r_v := PV[0]
φ_v := PV[1]*π/180
θ_v := PV[2]*π/180
# Задаём область отображения графика в окне Windows
x_LW := 200
y_LW := 100  # левый верхний угол области отображения
x_HW := 700
y_HW := 500  # правый нидний угол области отображения
K_view := [
    -sin(φ_v), cos(φ_v), 0, 0;
    -cos(θ_v)*cos(φ_v), -cos(θ_v)*sin(φ_v), sin(θ_v), 0;
    -sin(θ_v)*cos(φ_v), -sin(θ_v)*sin(φ_v), -cos(θ_v), r_v;
    0, 0, 0, 1
]
# Вычисляем координаты вершин пирамиды в видовой системе координат(ВСК)
PIR_V := K_view*PIR
# Определяем коодинаты проекции вершин пирамиды на картинную плоскость
P_XY := stack(transpose(transpose(PIR_V)[:, 0]), transpose(transpose(PIR_V)[:, 1]), transpose(transpose(PIR_V)[:, 3]))
# Определяем габаритную область проекции пирамиды на плоскость XY ВСК - картинную плоскость
x_L := min(transpose(P_XY)[:, 0])
y_H := max(transpose(P_XY)[:, 1])  # левый верхний угол
y_H = 8.07107
x_L = 0
x_H := max(transpose(P_XY)[:, 0])
y_L := min(transpose(P_XY)[:, 1])  # правый нижний угол
x_H = 3.53553
y_L = -2.5
# Вычисляем параметры, необходимые для формирования матрицы пересчёта координат из плоскости XY ВСК в ОСК
dx_W := x_HW - x_LW
dx_W = 500
dx := x_H - x_L
dx = 3.53553
dy_W := y_HW - y_LW
dy_W = 400
dy := y_H - y_L
dy = 10.5711
k_x := dx_W/dx
k_x = 141.421
k_y := dy_W/dy
k_y = 37.8391
T_SW := [k_x, 0, x_LW - k_x*x_L; 0, -k_y, y_HW + k_y*y_L; 0, 0, 1]  # матрица пересчёта из ВСК в ОСК
# Вычисляем оконные коодинаты вершин пирамиды
M_W := T_SW*P_XY
[x_a, x_b, x_c, x_a1, x_b1, x_c1; y_a, y_b, y_c, y_a1, y_b1, y_c1; q, q, q, q, q, q] := vectorize(round(M_W))
# Формируем массивы координат X и Y для рисования сечения пирамиды
X := transpose([x_a, x_b, x_c, x_a, x_a1, x_b1, x_c1, x_a1, x_c1, x_c, x_b, x_b1])
Y := transpose([y_a, y_b, y_c, y_a, y_a1, y_b1, y_c1, y_a1, y_c1, y_c, y_b, y_b1])
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# Вычисляем декартовы координаты камеры(вектора, определяющие положение камеры)
R_C := [r_v*sin(θ_v)*cos(φ_v); r_v*sin(θ_v)*sin(φ_v); r_v*cos(θ_v)]
# Вычисляем декартовы координаты векторы внешней нормали к каждой грани пирамиды
AC := [C[0]; C[1]; C[2]] - [A[0]; A[1]; A[2]]
AA_1 := [A1[0]; A1[1]; A1[2]] - [A[0]; A[1]; A[2]]
N_AA1C1C := AC×AA_1
N_ABB1A1 := transpose([0, -1, 0])
N_ABC := transpose([0, 0, -1])
N_A1B1C1 := transpose([0, 0, -1])
N_BCC1B1 := transpose([-1, 0, 0])
# Определяем видимость грани AA1C1C
q1 := R_C*N_AA1C1C
s1 := if(q1 ≥ 0, "Грань AA1C1C видима", "Грань AA1C1C невидима")
s1 = "Грань AA1C1C видима"
# Определяем видимость грани BCC1B1
q2 := R_C*N_BCC1B1
s2 := if(q2 ≥ 0, "Грань BCC1B1 видима", "Грань BCC1B1 невидима")
s2 = "Грань BCC1B1 невидима"
# Определяем видимость грани ABB1A1
q3 := R_C*N_ABB1A1
s3 := if(q3 ≥ 0, "Грань ABB1A1 видима", "Грань ABB1A1 невидима")
s3 = "Грань ABB1A1 видима"
# Определяем видимость грани ABC
q4 := R_C*N_ABC
s4 := if(q4 ≥ 0, "Грань ABC видима", "Грань ABC невидима")
s4 = "Грань ABC невидима"
# Определяем порядок обхода вершин для рисования видимых граней
X1 := transpose([x_c, x_a, x_b, x_b1, x_c1, x_a1, x_b1, x_b, x_a, x_a1, x_c1, x_c])
Y1 := transpose([y_c, y_a, y_b, y_b1, y_c1, y_a1, y_b1, y_b, y_a, y_a1, y_c1, y_c])
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# Задаём положение секущей плоскости в МСК XYZ
ϕ_grad := 50  # угол между осью z и вектором нормали к секущей плоскости
ϕ := ϕ_grad*π/180
N := transpose([0, sin(ϕ), cos(ϕ)])  # вектор нормали к секущей плоскости
x[0] := 0
y[0] := 0
z[0] := 3/4*PIR[:, 3][2]  # кооридинаты точки пересечения оси Z и секущей плоскости
z[0] = 7.5
# Задаём параметры уравнения секущей плоскости
[A2; B2; C2] := N
[A2; B2; C2] = [0; 0.766044; 0.642788]  # вектор нормали
D := -(A2*x[0] + B2*y[0] + C2*z[0])
D = -4.82091
# Находим точку пересечения P1 секущей плоскости с ребром AA1
dV := A1 - A
t_AA1 := -((N*A + D)/(N*dV))
V_AA1 := A + dV*t_AA1
x_AA1 := V_AA1[0]
y_AA1 := V_AA1[1]
z_AA1 := V_AA1[2]
# Находим точку пересечения P2 секущей плоскости с ребром BB1
dV := B1 - B
t_BB1 := -((N*B + D)/(N*dV))
V_BB1 := B + dV*t_BB1
x_BB1 := V_BB1[0]
y_BB1 := V_BB1[1]
z_BB1 := V_BB1[2]
# Находим точку пересечения P3 секущей плоскости с ребром CC1
dV := C1 - C
t_CC1 := -((N*C + D)/(N*dV))
V_CC1 := C + dV*t_CC1
x_CC1 := V_CC1[0]
y_CC1 := V_CC1[1]
z_CC1 := V_CC1[2]
# Получаем матрицу мировых координат точек P1, P2, P3
TR := [x_AA1, x_BB1, x_CC1; y_AA1, y_BB1, y_CC1; z_AA1, z_BB1, z_CC1; 1, 1, 1]
# Задаём область отображения грифа в окне Windows
x_LW := 100
y_LW := 200  # левый верхний угол области отображения
x_HW := 800
y_HW := 900  # правый нижний угол области отображения
# Вычисляем координаты вершин треугольника сечения P1, P2, P3 в видовой СК (ВСК)
TR_V := K_view*TR
# Определяем координаты проекции вершин треугольника сечения P1, P2, P3 на картинную плоскость
TR_XY := stack(transpose(transpose(TR_V)[:, 0]), transpose(transpose(TR_V)[:, 1]), transpose(transpose(TR_V)[:, 3]))
# Вычисляем параметры, необходимые для формирования матрицы пересчёта координат из плоскости XY ВСК в ОСК
dx_W := x_HW - x_LW
dx_W = 700
dx := x_H - x_L
dx = 3.53553
dy_W := y_HW - y_LW
dy_W = 700
dy := y_H - y_L
dy = 10.5711
k_x := dx_W/dx
k_x = 197.99
k_y := dy_W/dy
k_y = 66.2185
T_SW := [k_x, 0, x_LW - k_x*x_L; 0, -k_y, y_HW + k_y*y_L; 0, 0, 1]  # матрица пересчёта из ВСК в ОСК
# Вычисляем оконные коодинаты вершин пирамиды
M_W := T_SW*P_XY
[x_a, x_b, x_c, x_a1, x_b1, x_c1; y_a, y_b, y_c, y_a1, y_b1, y_c1; q, q, q, q, q, q] := vectorize(round(M_W))
# Формируем массивы координат X и Y для рисования сечения пирамиды
X := transpose([x_a, x_b, x_c, x_a, x_a1, x_b1, x_c1, x_a1, x_c1, x_c, x_b, x_b1])
Y := transpose([y_a, y_b, y_c, y_a, y_a1, y_b1, y_c1, y_a1, y_c1, y_c, y_b, y_b1])
# Вычисляем оконные координаты вершин треугольника P1, P2, P3
TR_W := T_SW*TR_XY
[x_p1, x_p2, x_p3; y_p1, y_p2, y_p3; z_p1, z_p2, z_p3] := vectorize(round(TR_W))
# Формируем массивы координат X и Y для рисования сечения пирамиды
XC := transpose([x_p2, x_p3, x_p1, x_p2])
YC := transpose([y_p2, y_p3, y_p1, y_p2])
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