# Чтение данных из файлов
x := READPRN("D:\4_sem\geometry\lab_11\Lab01\X_bez.txt")
y := READPRN("D:\4_sem\geometry\lab_11\Lab01\Y_bez.txt")
xB := READPRN("D:\4_sem\geometry\lab_11\Lab01\XB_bez.txt")
yB := READPRN("D:\4_sem\geometry\lab_11\Lab01\YB_bez.txt")
# Построение графиков
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