# Чтение данных из файлов
x := READPRN("D:\4_sem\geometry\lab_11\Lab01\X_lagr.txt")
y := READPRN("D:\4_sem\geometry\lab_11\Lab01\Y_lagr.txt")
yL := READPRN("D:\4_sem\geometry\lab_11\Lab01\YL_lagr.txt")
xL := READPRN("D:\4_sem\geometry\lab_11\Lab01\XL_lagr.txt")
# Построение графиков
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